Площа_Вписаного_Круга/Площа_Квадрата == πr^2/(2*r)^2 == π/4
As == a^2
Ac == πa^2
Ac/As == πa^2/a^2 == π
I == integral(φ(x), x = a .. b)
M*[φ(x)] == integral(φ(x)*f(x), x = a .. b) == 1/(b - a)*integral(φ(x), x = a .. b)
integral(φ(x), x = a .. b) == (b - a)*M*[φ(x)]
σ^2 == integral(φ^2*x*f(x), x = a .. b) - (M*[φ(X)])^2
I[1]^※ == (b - a)*sum(φ(x[i]), i = 1 .. N)/N
1/(b - a)*integral(□, x = a .. x[i]) == r[i]
