k := 9 - 5
α := 0.2*k
β := α
ORIGIN := 1
N := 4
X := [0; 0; 0; 0]
matrix := [
    8.30, 2.62 + α, 4.10, 1.90;
    3.92, 8.45, 8.78 - α, 2.46;
    3.77, 7.21 + α, 8.04, 2.28;
    2.21, 3.65 - α, 1.69, 6.99
] = [8.3, 3.42, 4.1, 1.9; 3.92, 8.45, 7.98, 2.46; 3.77, 8.01, 8.04, 2.28; 2.21, 2.85, 1.69, 6.99]
rightPart := [-10.65 + β; 12.21; 15.45 - β; -8.35] = [-9.85; 12.21; 14.65; -8.35]
extenededMatrix := augment(matrix, rightPart)
extenededMatrix = [
    8.3, 3.42, 4.1, 1.9, -9.85;
    3.92, 8.45, 7.98, 2.46, 12.21;
    3.77, 8.01, 8.04, 2.28, 14.65;
    2.21, 2.85, 1.69, 6.99, -8.35
]
solve block
    # constraints
    matrix*X == rightPart
    # solver
    find(X) = [-3.01308; -3.39588; 6.75747; -0.491124]
    X
end solve block
r := rightPart - (matrix*X)
Z := 10^-4 - 10^-6
r = [-9.85; 12.21; 14.65; -8.35]
x := [0.000009; -0.000012; -0.000011; -0.000003]
xm := r
Z = 9.9e-5
δ := sqrt(1/N*sum((x[k] - xm[k])^2, k = 1 .. N))
δ = 11.5158
