ORIGIN := 1
A := [1, 2, 4; 3, -4, 1; 2, 3, 6]
RHS := [4; -1; 4]
n := rows(A)
n = 3
C := augment(A, RHS)
C = [1, 2, 4, 4; 3, -4, 1, -1; 2, 3, 6, 4]
step := 1 .. n - 1
forward_elimination(step) :=
    C ← C
    for k ∈ 1 .. n - 1
        for i ∈ (k + 1) .. n
            multiplier ← C[i, k]/C[k, k]
            for j ∈ k .. n + 1
                C[i, j] ← C[i, j] - multiplier*C[k, j]
            U[k] ← C
    U[step]
forward_elimination(step) = [[1, 2, 4, 4; 0, -10, -11, -13; 0, -1, -2, -4]; [1, 2, 4, 4; 0, -10, -11, -13; 0, 0, -0.9, -2.7]]
upper_triangular := submatrix(forward_elimination(n - 1), 1, n, 1, n)
upper_triangular = [1, 2, 4; 0, -10, -11; 0, 0, -0.9]
RHSnew := submatrix(forward_elimination(n - 1), 1, n, n + 1, n + 1)
RHSnew = [4; -13; -2.7]
back_substitution :=
    a ← upper_triangular
    rhs ← RHSnew
    x[n] ← rhs[n]/a[n, n]
    for i ∈ n - 1, n - 2 .. 1
        sum ← 0
        for j ∈ n - 1, n - 2 .. 1
            sum ← sum + a[i, j]*x[j]
        x[i] ← (rhs[i] - sum)/a[i, i]
    x
X := back_substitution
X = [1.4; 1.3; 3]
exatsoln := lsolve(A, RHS)
exatsoln = [-4; -2; 3]
