k := 9 - 5
α := 0.2*k = 0.8
β := α
A := [
    8.30, 2.62 + α, 4.10, 1.90;
    3.92, 8.45, 8.78 - α, 2.46;
    3.77, 7.21 + α, 8.04, 2.28;
    2.21, 3.65 - α, 1.69, 6.99
] = [8.3, 3.42, 4.1, 1.9; 3.92, 8.45, 7.98, 2.46; 3.77, 8.01, 8.04, 2.28; 2.21, 2.85, 1.69, 6.99]
B := [-10.65 + β; 12.21; 15.45 - β; -8.35] = [-9.85; 12.21; 14.65; -8.35]
