k := 9 - 5 = 4
α := 0.5*k = 2
β := α = 2
ORIGIN := 1
N := 4
matrix := [
    3.81, 0.25, 1.28, 0.75 + α;
    2.25, 1.32, 4.58 + α, 0.49;
    5.31, 6.28 + α, 0.98, 1.04;
    9.39 + α, 2.45, 3.35, 2.28
] = [3.81, 0.25, 1.28, 2.75; 2.25, 1.32, 6.58, 0.49; 5.31, 8.28, 0.98, 1.04; 11.39, 2.45, 3.35, 2.28]
X := [0; 0; 0; 0]
rightPart := [4.21; 6.47 + β; 2.38; 10.48 + β] = [4.21; 8.47; 2.38; 12.48]
extenededMatrix := augment(matrix, rightPart)
extenededMatrix = [
    3.81, 0.25, 1.28, 2.75, 4.21;
    2.25, 1.32, 6.58, 0.49, 8.47;
    5.31, 8.28, 0.98, 1.04, 2.38;
    11.39, 2.45, 3.35, 2.28, 12.48
]
solve block
    # constraints
    matrix*X == rightPart
    # solver
    X := find(X) = [0.901765; -0.394924; 1.07161; -0.181328]
    X
end solve block
Z := 10^-4 - 10^-6
r := rightPart - (matrix*X)
x := [-3.013084; -3.39588; 6.757474; -0.491124]
Z = 9.9e-5
r = [8.88178e-16; 0; 0; 1.77636e-15]
xm := X
δ := sqrt(1/N*sum((x[k] - xm[k])^2, k = 1 .. N))
δ = 3.76686
