k := 3*(3 - 4) + 9 = 6
t := 9
a := 0.11*t = 0.99
b := 0.02*k = 0.12
g := b
d := 0.015*t = 0.135
X := [0; 0; 0; 0]
ORIGIN := 1
matrix := [
    6.26 + a, 1.10 - b, 0.97 + g, 1.24 - d;
    1.10 - b, 4.16 - a, 1.30, 0.16;
    0.97 + g, 1.30, 5.44 + a, 2.10;
    1.24 - d, 0.16, 2.10, 6.1 - a
] = [7.25, 0.98, 1.09, 1.105; 0.98, 3.17, 1.3, 0.16; 1.09, 1.3, 6.43, 2.1; 1.105, 0.16, 2.1, 5.11]
N := 4
rightPart := [4.21; 6.47 + β; 2.38; 10.48 + β]  # error: This variable is undefined. Check that the label is set correctly.
extenededMatrix := augment(matrix, rightPart)  # error: This variable is undefined. Check that the label is set correctly.
extenededMatrix =  # error: This variable is undefined. Check that the label is set correctly.
matrixDiagonal := [
    15.2, 4.63, 2.7, 5.03;
    2.25, 6.58, 1.32, 0.49;
    5.31, 0.98, 8.28, 1.04;
    0, 0.119454, -0.426777, 1.48919
]
rightPartDiagonal := [16.69; 8.47; 2.38; 0.026518]
extenededMatrixDiagonal := augment(matrixDiagonal, rightPartDiagonal)
extenededMatrixDiagonal = [
    15.2, 4.63, 2.7, 5.03, 16.69;
    2.25, 6.58, 1.32, 0.49, 8.47;
    5.31, 0.98, 8.28, 1.04, 2.38;
    0, 0.119454, -0.426777, 1.48919, 0.026518
]
solve block
    # constraints
    matrixDiagonal*X == rightPartDiagonal
    # solver
    X := find(X) = [0.901766; 1.07161; -0.394924; -0.18133]
    X
end solve block
r := rightPartDiagonal - (matrixDiagonal*X)
xm := X
x := [0.901766; 1.071608; -0.394924; -0.18133]
r = [0; 0; 8.88178e-16; 1.38778e-17]
δ := sqrt(1/N*sum((x[k] - xm[k])^2, k = 1 .. N))
δ = 3.5452e-7
δ = 3.5452e-7
