# Worksheet setting: ORIGIN = 1
# Задаю початкові значення
k := 9 - 1
x1 := -5 + k = 3
x2 := -3 + k = 5
x3 := -1 + k = 7
x4 := 1 + k = 9
x5 := 3 + k = 11
α := 3
f(x) := sin(α/2*x) + nthroot(x*α, 3)
y1 := f(x1) = 1.10255
y2 := f(x2) = 3.40421
y3 := f(x3) = 1.87923
y4 := f(x4) = 3.80378
y5 := f(x5) = 2.49575
ORIGIN := 1
# Задаю крок
step := 0.05
v := x1, x1 + step .. x5
# Виводжу графік функції
# [plot: f(v) vs v]
x := [x1; x2; x3; x4; x5]
y := [y1; y2; y3; y4; y5]
# Перевіряю поліном Лагранжа
temp1(z) := y1*((z - 5)/(3 - 5))*((z - 7)/(3 - 7))*((z - 9)/(3 - 9))*((z - 11)/(3 - 11))
temp2(z) := y2*((z - 3)/(5 - 3))*((z - 7)/(5 - 7))*((z - 9)/(5 - 9))*((z - 11)/(5 - 11))
temp3(z) := y3*((z - 3)/(7 - 3))*((z - 5)/(7 - 5))*((z - 9)/(7 - 9))*((z - 11)/(7 - 11))
temp4(z) := y4*((z - 3)/(9 - 3))*((z - 5)/(9 - 5))*((z - 7)/(9 - 7))*((z - 11)/(9 - 11))
temp5(z) := y5*((z - 3)/(11 - 3))*((z - 5)/(11 - 5))*((z - 7)/(11 - 7))*((z - 9)/(11 - 9))
polynomial(z) := temp1(z) + temp2(z) + temp3(z) + temp4(z) + temp5(z) simplify → -0.0363497727061*z^4 + 1.02398166214*z^3 - 10.2401901829*z^2 + 42.7843873673*z - 59.792070039
# Перевіряю похибку без закруглення та з ним
|f(x1) - polynomial(x1)| = 2.4869e-14
|f(x2) - polynomial(x2)| = 3.15303e-14
|f(x3) - polynomial(x3)| = 6.03961e-14
|f(x4) - polynomial(x4)| = 1.72307e-13
|f(x5) - polynomial(x5)| = 1.43885e-13
polynomialWithRounding(z) := -0.03634*z^4 + 1.02398*z^3 - 10.24019*z^2 + 42.78438*z - 59.79207
|f(x1) - polynomialWithRounding(x1)| = 0.000726295
|f(x2) - polynomialWithRounding(x2)| = 0.00586795
|f(x3) - polynomialWithRounding(x3)| = 0.0228516
|f(x4) - polynomialWithRounding(x4)| = 0.0628556
|f(x5) - polynomialWithRounding(x5)| = 0.140811
polynomial(x1) = 1.10255
polynomial(x3) = 1.87923
polynomial(x5) = 2.49575
polynomial(x2) = 3.40421
polynomial(x4) = 3.80378
# Порівняльний графік функції та інтерполяційного поліному
# [plot: f(v), polynomial(v) vs v]
# Порівняльний графік функції та сплайн-інтерполяції з програми
# Приклад роботи різних функцій
exampleS1 := lspline(x, y)
exampleS2 := pspline(x, y)
exampleS3 := cspline(x, y)
A1(v) := interp(exampleS1, x, y, v)
A2(v) := interp(exampleS2, x, y, v)
A3(v) := interp(exampleS3, x, y, v)
A1(3) = 1.10255
A2(3) = 1.10255
A3(3) = 1.10255
# [plot: A1(v), A2(v), A3(v) vs v]
# Розв’язок інтерполяції сплайнами у Mathcad (із наведенням порівняльних графіків)
S1(t) := y[1] + b1(t - x[1]) + c1(t - x[1])^2 + d1(t - x[1])^3  # error: This variable is undefined. Check that the label is set correctly.
x = [3; 5; 7; 9; 11]
y = [1.10255; 3.40421; 1.87923; 3.80378; 2.49575]
S2(t) := y[2] + b2(t - x[2]) + c2(t - x[2])^2 + d2(t - x[2])^3  # error: This variable is undefined. Check that the label is set correctly.
S3(t) := y[3] + b3(t - x[3]) + c3(t - x[3])^2 + d3(t - x[3])^3  # error: This variable is undefined. Check that the label is set correctly.
S4(t) := y[4] + b4(t - x[4]) + c4(t - x[4])^2 + d4(t - x[4])^3  # error: This variable is undefined. Check that the label is set correctly.
