# Worksheet setting: ORIGIN = 1
# Задаю початкові значення
zalikova := 9311
group := 93
a5 := 1
a4 := -2
a3 := -4
ORIGIN := 1
variant := 1
α := 9
k := 3
a2 := 0
a1 := 2
a0 := 1
equation(x) := a5*(1 + α)*x^5 + a4*x^4 + a3*x^3 + a2*x^2 + a1*x + k*a0
equationWithVariables(x) := 1*(1 + 9)*x^5 - 2*x^4 - 4*x^3 + 0*x^2 + 2*x + k*1
equationWithNumbers(x) := 10*x^5 - 2*x^4 - 4*x^3 + 2*x + 3
interval := [-0.7; -0.8]
# Шукаю корінь рівняння
equationRoot(x) := root(equationWithNumbers(x), x, interval[1], interval[2]) = -0.762158
# Рівняння для графічного методу
firstEquationWithNumbers(x) := 10*x^5 - 2*x^4 - 4*x^3
secondEquationWithNumbers(x) := -2*x - 3
# Графіки загалом
# [plot: equationWithNumbers(x), firstEquationWithNumbers(x), secondEquationWithNumbers(x) vs x]
# Графіки з більшим масштабом
# [plot: equationWithNumbers(x), firstEquationWithNumbers(x), secondEquationWithNumbers(x) vs x]
