# Worksheet setting: ORIGIN = 1
# Початкові значення
variant := 9
function(x) := cos(x)/(x + 1)
a := 0.1
b := 1.1
function2(x) := d^2/dx^2(function(x))
function3(x) := d^3/dx^3(function(x))
function4(x) := d^4/dx^4(function(x))
function4 max →  # error: There is no keyword named {0}.
# [plot: function(x), function2(x), function3(x), function4(x) vs x]
# Обчислюю похибки
integralValueMathcad := integral(function(x), x = a .. b) = 0.530173
integralValueProgramSimpson := 0.530173402559
integralValueProgramGauss := 0.530164042495
MathcadAndSimpsonDiff := |integralValueMathcad - integralValueProgramSimpson| = 5.24212e-7
MathcadAndGaussDiff := |integralValueMathcad - integralValueProgramGauss| = 8.83585e-6
integralAnalyzeProgSimpsonDiff := 0.000071715111221
integralAnalyzeProgGaussDiff := 0.000099019003464
IsRealSmallerSimpson :=
    if integralAnalyzeProgSimpsonDiff > MathcadAndSimpsonDiff
        return 1
    else
        return 0
IsRealSmallerSimpson = 1
IsRealSmallerGauss :=
    if integralAnalyzeProgGaussDiff > MathcadAndGaussDiff
        return 1
    else
        return 0
IsRealSmallerGauss = 1
