# Worksheet setting: ORIGIN = 1
# Початкові значення
variant := 9
n := variant - 5 = 4
a := 1 + 0.4*n = 2.6
interval := [0; 4]
k := variant - 5 = 4
b := 1 + 0.4*k = 2.6
h := 0.1
RungeKuttaYs := [
    0; 0.230506465742; 0.414258841269; 0.562936868022; 0.683593134403; 0.781219973982; 0.781219973982; 0.859774258422; 0.922580966183; 0.972486207991
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]
RungeKuttaErrors := [
    0; 0.000000437561509; 0.000000662387270; 0.000000803684329; 0.000000903386957; 0.000000978628499; 0.00276172892593; 0.00221118035348; 0.00175917484224; 0.00139145256145
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]
AdamsYs := [
    0; 0.230506465742; 0.414258841269; 0.562936868022; 0.683617259938; 0.781256359395; 0.859816684305; 0.922626612642; 0.972533941062; 1.01196829712
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]
AdamsErrors := [
    0; 0.000000437561509; 0.000000662387270; 0.000000803684329; 0.000000845607467; 0.000000884746372; 0.000000920282543; 0.000000951127685; 0.000000977186805; 0.000000998748837
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]
